*Heading
** Job name: Solid Model name: Solid
** Generated by: Abaqus/CAE 6.10-2
*Preprint, echo=NO, model=NO, history=NO, contact=NO
**
** PARTS
**
*Part, name=Impactor
*Node
      1,         0.25,           0.,           0.
      2,           0.,           0.,           0.
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*Element, type=C3D8R
  1,  241,  242,  933,  922,   14,   15,  170,  169
  2,  242,  243,  934,  933,   15,   16,  171,  170
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*End Part
**
*Part, name=Plate
*Node
      1,  0.176776692,  0.176776692,  0.159999996
      2,           0.,           0.,  0.159999996
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*Element, type=C3D8R
  1, 1251, 1252, 8309, 8304,   55,   56, 1220, 1219
  2, 1252, 1253, 8310, 8309,   56,   57, 1221, 1220
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*Nset, nset=_PickedSet36, internal, generate
     1,  18198,      1
*Elset, elset=_PickedSet36, internal, generate
     1,  15896,      1
*Nset, nset=_PickedSet37, internal, generate
     1,  18198,      1
*Elset, elset=_PickedSet37, internal, generate
     1,  15896,      1
*Orientation, name=Ori-1
          1.,           0.,           0.,           0.,           1.,           0.
3, 0.
** Section: PlateSection
*Solid Section, elset=_PickedSet37, orientation=Ori-1, material=Material-1
,
*End Part
**
**
** ASSEMBLY
**
*Assembly, name=Assembly
**
*Instance, name=Plate-1, part=Plate
*End Instance
**
*Instance, name=Impactor-1, part=Impactor
          0.,           0., -0.911999996423721
*End Instance
**
*Nset, nset=#02:Projectile, instance=Impactor-1, generate
    1,  1808,     1
*Elset, elset=#02:Projectile, instance=Impactor-1, generate
    1,  1440,     1
*Nset, nset=#01:PlateEdges, instance=Plate-1
   11,   12,   13,   14,   17,   18
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*Elset, elset=#01:PlateEdges, instance=Plate-1
   917,   918,   919,   920,   921,   922
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*End Assembly
**
** MATERIALS
**
*Material, name=Material-1
*Elastic, type=ENGINEERING CONSTANTS
1.,1.,1.,1.,1.,1.,1.,1.
1.,
